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# Main equations (see details in manuscript)
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# 1.1 Condorcet model (R(N)=εc*N, μ(k)=μ)
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# Parameters
σ := 1/90  # Aging mortality rate (inverse of potential lifespan)
c := 0.0  # Additional mortality rate of birth givers
b := 0.23  # Fecundity rate, number of offspring per reproductive individual per time, for sexual population ~ 0.5*(potential fertility/reproductive lifespan)
eb := 1.2  # Resource rate necessary for reproduction
em := 0.5  # Resource rate necessary for survival
ec := 1.0  # Resource productivity, incoming resource rate per individual
μ := 0.2  # Equality change rate
N0 := e^0.5  # Initial population size
# 1.2 Condorcet model (calculations)
# The free variable k is the level of equality in resource distribution.
B(k, ec) := (b - c)*ibeta(1/2, eb*k/ec + 1, k)  # Birth rate
M(k, ec) := 1 - (1 - σ)*ibeta(1/2, em*k/ec + 1, k)  # Morality rate
LRS(k, ec) := B(k, ec)/M(k, ec)  # LRS (Lifetime Reproductive Success)
G(k, ec) := B(k, ec) - M(k, ec)  # Growth rate
kb(z) :=
    k ← root(G(z, ec), z)
    return k
# The range of equality [kl,kr] where
# the growth rate is positive
kl := kb(1)
kr := kb(200)
Mkb(z) :=
    k ← root(d/dz(G(z, ec)), z)
    return k
# The value of the equality km at which the growth rate is maximal
km := Mkb(kl)
Mlrs(z) :=
    k ← root(d/dz(LRS(z, ec)), z)
    return k
# The value of the equality kml at which LRS is maximal
kml := Mlrs(2*kl)
lnN(k, ec) :=
    ln(N0) if k < kl
    (ln(N0) + integral(G(z, ec)/μ, z = kl .. k)) otherwise
# Log population size
# 1.3 Condorcet model (plots)
a := -1 .. 8
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# I  II  III  IV  V
# 1.4 Condorcet multi-phase population transition model
# Phases
#
# I (Malthsian)
#
# II (Acceleration)
#
# III (Exponential)
#
# IV (Retardation)
#
# V (Decline)
# Range of equality
#
# ]0,kl]
#
# [kl,km]
#
# [km,kml]
#
# [kml,kr]
#
# [kr,inf[
# Population growth
#
# close to zero
#
# expotential with incresing rate
#
# expotential with constant rate
#
# expotential with deceasing rate
#
# expotential with negative rate
LRS1(k, ec) :=
    1 if k < kl
    LRS(k, ec) otherwise
G1(k, ec) :=
    0 if k < kl
    G(k, ec) otherwise
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# 2.1 Transient Malthusian model (R(N)=R, μ(k)=μ)
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# Parameters
R := 100  # Fixed resource amount
b := 1.0  # The remaining parameters are the same as specified above
# The free variables k and n represent the level of equality and the population size.
# 2.2 Transient Malthusian model (calculations)
B(n, k) := (b - c)*ibeta(1/2, eb*k*n/R + 1, k)  # Birth rate
M(n, k) := 1 - (1 - σ)*ibeta(1/2, em*k*n/R + 1, k)  # Morality rate
LRS(n, k) := B(n, k)/M(n, k)  # LRS =1 at the equilibrium population size N*
G(n, k) := B(n, k) - M(n, k)  # Growth rate=0 at the equilibrium population size N*
N(k) := root(G(n, k), n, eb, R/em)  # Equilibrium population size N*(k)
kmax := root(d/dk(N(k)), k, eb, R/em)  # The level of equality at which the population size reaches its maximum
# 2.3 Transient Malthusian model (plots)
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# Note: As equality increases, the population becomes increasingly density-independent within the interval [R/eb,R/em]. This means it can have any population size within this interval with nearly equal probability. In this case, it is more appropriate to use the term "equilibrium population interval" rather than "equilibrium point".
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# Note: In equilibrium-based models (i.e., where B(n,k) ≈ M(n,k) always holds), there is an optimal level of equality kmax at which the population reaches its maximum size.
# 3.1 Malthusian model (R(N)=εr*ln(N), μ(k)=0)
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# Parameters
er := 20  # Resource growth rate coefficient
b := 1.0  # The remaining parameters are the same as specified above
# The free variables k and n represent the level of equality and the population size.
# 3.2 Malthusian model (calculations)
B(n, k) := (b - c)*ibeta(1/2, eb*k*n/(er*ln(n)) + 1, k)  # Birth rate
M(n, k) := 1 - (1 - σ)*ibeta(1/2, em*k*n/(er*ln(n)) + 1, k)  # Morality rate
LRS(n, k) := B(n, k)/M(n, k)  # LRS =1 at the equilibrium population size N*
G(n, k) := B(n, k) - M(n, k)  # Growth rate=0 at the equilibrium population size N*
Nb(x) :=
    y ← er
    return root(ln(1 + y)/y - x/er, y)
# Asymptotic population size intervals at which the growth rate is maximal [0,NL] and at which the growth rate is close to zero [NL,NR] (i.e. equilibrium population interval).
NL := Nb(eb)
NR := Nb(em)
N(k) := root(G(n, k), n, eb, NR)  # Equilibrium population size N*(k)
z := NL
kmax := root(d/dz(N(z)), z)  # The level of equality at which the population size reaches its maximum
# 3.3 Malthusian model (plots)
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# Note: An equilibrium arises given any sublinear relationship between the resource and the population size. Under these conditions, the results remain qualitatively the same.
